// generated by /usr/local/opt/gridlabd/4.3.17-250804-develop-darwin_23-x86_64/share/gridlabd/py2glm.py -i case14.py -o case14.glm -t pypower
module pypower
{
    version 2;
    baseMVA 100.0;
}

//
// bus
//
object pypower.bus
{
    name "pp_bus_1";
    bus_i 1;
    type 3;
    Pd 0 MW;
    Qd 0 MVAr;
    Gs 0 MW;
    Bs 0 MVAr;
    area 1;
    Vm 1.06 pu.kV;
    Va 0 deg;
    baseKV 0 kV;
    zone 1;
    Vmax 1.06 pu.kV;
    Vmin 0.94 pu.kV;
}
object pypower.bus
{
    name "pp_bus_2";
    bus_i 2;
    type 2;
    Pd 21.7 MW;
    Qd 12.7 MVAr;
    Gs 0 MW;
    Bs 0 MVAr;
    area 1;
    Vm 1.045 pu.kV;
    Va -4.98 deg;
    baseKV 0 kV;
    zone 1;
    Vmax 1.06 pu.kV;
    Vmin 0.94 pu.kV;
}
object pypower.bus
{
    name "pp_bus_3";
    bus_i 3;
    type 2;
    Pd 94.2 MW;
    Qd 19 MVAr;
    Gs 0 MW;
    Bs 0 MVAr;
    area 1;
    Vm 1.01 pu.kV;
    Va -12.72 deg;
    baseKV 0 kV;
    zone 1;
    Vmax 1.06 pu.kV;
    Vmin 0.94 pu.kV;
}
object pypower.bus
{
    name "pp_bus_4";
    bus_i 4;
    type 1;
    Pd 47.8 MW;
    Qd -3.9 MVAr;
    Gs 0 MW;
    Bs 0 MVAr;
    area 1;
    Vm 1.019 pu.kV;
    Va -10.33 deg;
    baseKV 0 kV;
    zone 1;
    Vmax 1.06 pu.kV;
    Vmin 0.94 pu.kV;
}
object pypower.bus
{
    name "pp_bus_5";
    bus_i 5;
    type 1;
    Pd 7.6 MW;
    Qd 1.6 MVAr;
    Gs 0 MW;
    Bs 0 MVAr;
    area 1;
    Vm 1.02 pu.kV;
    Va -8.78 deg;
    baseKV 0 kV;
    zone 1;
    Vmax 1.06 pu.kV;
    Vmin 0.94 pu.kV;
}
object pypower.bus
{
    name "pp_bus_6";
    bus_i 6;
    type 2;
    Pd 11.2 MW;
    Qd 7.5 MVAr;
    Gs 0 MW;
    Bs 0 MVAr;
    area 1;
    Vm 1.07 pu.kV;
    Va -14.22 deg;
    baseKV 0 kV;
    zone 1;
    Vmax 1.06 pu.kV;
    Vmin 0.94 pu.kV;
}
object pypower.bus
{
    name "pp_bus_7";
    bus_i 7;
    type 1;
    Pd 0 MW;
    Qd 0 MVAr;
    Gs 0 MW;
    Bs 0 MVAr;
    area 1;
    Vm 1.062 pu.kV;
    Va -13.37 deg;
    baseKV 0 kV;
    zone 1;
    Vmax 1.06 pu.kV;
    Vmin 0.94 pu.kV;
}
object pypower.bus
{
    name "pp_bus_8";
    bus_i 8;
    type 2;
    Pd 0 MW;
    Qd 0 MVAr;
    Gs 0 MW;
    Bs 0 MVAr;
    area 1;
    Vm 1.09 pu.kV;
    Va -13.36 deg;
    baseKV 0 kV;
    zone 1;
    Vmax 1.06 pu.kV;
    Vmin 0.94 pu.kV;
}
object pypower.bus
{
    name "pp_bus_9";
    bus_i 9;
    type 1;
    Pd 29.5 MW;
    Qd 16.6 MVAr;
    Gs 0 MW;
    Bs 19 MVAr;
    area 1;
    Vm 1.056 pu.kV;
    Va -14.94 deg;
    baseKV 0 kV;
    zone 1;
    Vmax 1.06 pu.kV;
    Vmin 0.94 pu.kV;
}
object pypower.bus
{
    name "pp_bus_10";
    bus_i 10;
    type 1;
    Pd 9 MW;
    Qd 5.8 MVAr;
    Gs 0 MW;
    Bs 0 MVAr;
    area 1;
    Vm 1.051 pu.kV;
    Va -15.1 deg;
    baseKV 0 kV;
    zone 1;
    Vmax 1.06 pu.kV;
    Vmin 0.94 pu.kV;
}
object pypower.bus
{
    name "pp_bus_11";
    bus_i 11;
    type 1;
    Pd 3.5 MW;
    Qd 1.8 MVAr;
    Gs 0 MW;
    Bs 0 MVAr;
    area 1;
    Vm 1.057 pu.kV;
    Va -14.79 deg;
    baseKV 0 kV;
    zone 1;
    Vmax 1.06 pu.kV;
    Vmin 0.94 pu.kV;
}
object pypower.bus
{
    name "pp_bus_12";
    bus_i 12;
    type 1;
    Pd 6.1 MW;
    Qd 1.6 MVAr;
    Gs 0 MW;
    Bs 0 MVAr;
    area 1;
    Vm 1.055 pu.kV;
    Va -15.07 deg;
    baseKV 0 kV;
    zone 1;
    Vmax 1.06 pu.kV;
    Vmin 0.94 pu.kV;
}
object pypower.bus
{
    name "pp_bus_13";
    bus_i 13;
    type 1;
    Pd 13.5 MW;
    Qd 5.8 MVAr;
    Gs 0 MW;
    Bs 0 MVAr;
    area 1;
    Vm 1.05 pu.kV;
    Va -15.16 deg;
    baseKV 0 kV;
    zone 1;
    Vmax 1.06 pu.kV;
    Vmin 0.94 pu.kV;
}
object pypower.bus
{
    name "pp_bus_14";
    bus_i 14;
    type 1;
    Pd 14.9 MW;
    Qd 5 MVAr;
    Gs 0 MW;
    Bs 0 MVAr;
    area 1;
    Vm 1.036 pu.kV;
    Va -16.04 deg;
    baseKV 0 kV;
    zone 1;
    Vmax 1.06 pu.kV;
    Vmin 0.94 pu.kV;
}

//
// gen
//
object pypower.gen
{
    name "pp_gen_1";
    bus 1;
    parent "pp_bus_1";
    Pg 232.4 MW;
    Qg -16.9 MVAr;
    Qmax 10 MVAr;
    Qmin 0 MVAr;
    Vg 1.06 pu.kV;
    mBase 100 MVA;
    status 1;
    Pmax 332.4 MW;
    Pmin 0 MW;
    Pc1 0 MW;
    Pc2 0 MW;
    Qc1min 0 MVAr;
    Qc1max 0 MVAr;
    Qc2min 0 MVAr;
    Qc2max 0 MVAr;
    ramp_agc 0 MW/min;
    ramp_10 0 MW;
    ramp_30 0 MW;
    ramp_q 0 MVAr/min;
    apf 0 pu;
}
object pypower.gen
{
    name "pp_gen_2";
    bus 2;
    parent "pp_bus_2";
    Pg 40 MW;
    Qg 42.4 MVAr;
    Qmax 50 MVAr;
    Qmin -40 MVAr;
    Vg 1.045 pu.kV;
    mBase 100 MVA;
    status 1;
    Pmax 140 MW;
    Pmin 0 MW;
    Pc1 0 MW;
    Pc2 0 MW;
    Qc1min 0 MVAr;
    Qc1max 0 MVAr;
    Qc2min 0 MVAr;
    Qc2max 0 MVAr;
    ramp_agc 0 MW/min;
    ramp_10 0 MW;
    ramp_30 0 MW;
    ramp_q 0 MVAr/min;
    apf 0 pu;
}
object pypower.gen
{
    name "pp_gen_3";
    bus 3;
    parent "pp_bus_3";
    Pg 0 MW;
    Qg 23.4 MVAr;
    Qmax 40 MVAr;
    Qmin 0 MVAr;
    Vg 1.01 pu.kV;
    mBase 100 MVA;
    status 1;
    Pmax 100 MW;
    Pmin 0 MW;
    Pc1 0 MW;
    Pc2 0 MW;
    Qc1min 0 MVAr;
    Qc1max 0 MVAr;
    Qc2min 0 MVAr;
    Qc2max 0 MVAr;
    ramp_agc 0 MW/min;
    ramp_10 0 MW;
    ramp_30 0 MW;
    ramp_q 0 MVAr/min;
    apf 0 pu;
}
object pypower.gen
{
    name "pp_gen_4";
    bus 6;
    parent "pp_bus_6";
    Pg 0 MW;
    Qg 12.2 MVAr;
    Qmax 24 MVAr;
    Qmin -6 MVAr;
    Vg 1.07 pu.kV;
    mBase 100 MVA;
    status 1;
    Pmax 100 MW;
    Pmin 0 MW;
    Pc1 0 MW;
    Pc2 0 MW;
    Qc1min 0 MVAr;
    Qc1max 0 MVAr;
    Qc2min 0 MVAr;
    Qc2max 0 MVAr;
    ramp_agc 0 MW/min;
    ramp_10 0 MW;
    ramp_30 0 MW;
    ramp_q 0 MVAr/min;
    apf 0 pu;
}
object pypower.gen
{
    name "pp_gen_5";
    bus 8;
    parent "pp_bus_8";
    Pg 0 MW;
    Qg 17.4 MVAr;
    Qmax 24 MVAr;
    Qmin -6 MVAr;
    Vg 1.09 pu.kV;
    mBase 100 MVA;
    status 1;
    Pmax 100 MW;
    Pmin 0 MW;
    Pc1 0 MW;
    Pc2 0 MW;
    Qc1min 0 MVAr;
    Qc1max 0 MVAr;
    Qc2min 0 MVAr;
    Qc2max 0 MVAr;
    ramp_agc 0 MW/min;
    ramp_10 0 MW;
    ramp_30 0 MW;
    ramp_q 0 MVAr/min;
    apf 0 pu;
}

//
// branch
//
object pypower.branch
{
    name "pp_branch_1";
    fbus 1;
    from "pp_bus_1";
    tbus 2;
    to "pp_bus_2";
    r 0.01938 pu.Ohm;
    x 0.05917 pu.Ohm;
    b 0.0528 pu.S;
    rateA 9900 MVA;
    rateB 0 MVA;
    rateC 0 MVA;
    ratio 0 pu;
    angle 0 deg;
    status 1;
    angmin -360 deg;
    angmax 360 deg;
}
object pypower.branch
{
    name "pp_branch_2";
    fbus 1;
    from "pp_bus_1";
    tbus 5;
    to "pp_bus_5";
    r 0.05403 pu.Ohm;
    x 0.22304 pu.Ohm;
    b 0.0492 pu.S;
    rateA 9900 MVA;
    rateB 0 MVA;
    rateC 0 MVA;
    ratio 0 pu;
    angle 0 deg;
    status 1;
    angmin -360 deg;
    angmax 360 deg;
}
object pypower.branch
{
    name "pp_branch_3";
    fbus 2;
    from "pp_bus_2";
    tbus 3;
    to "pp_bus_3";
    r 0.04699 pu.Ohm;
    x 0.19797 pu.Ohm;
    b 0.0438 pu.S;
    rateA 9900 MVA;
    rateB 0 MVA;
    rateC 0 MVA;
    ratio 0 pu;
    angle 0 deg;
    status 1;
    angmin -360 deg;
    angmax 360 deg;
}
object pypower.branch
{
    name "pp_branch_4";
    fbus 2;
    from "pp_bus_2";
    tbus 4;
    to "pp_bus_4";
    r 0.05811 pu.Ohm;
    x 0.17632 pu.Ohm;
    b 0.034 pu.S;
    rateA 9900 MVA;
    rateB 0 MVA;
    rateC 0 MVA;
    ratio 0 pu;
    angle 0 deg;
    status 1;
    angmin -360 deg;
    angmax 360 deg;
}
object pypower.branch
{
    name "pp_branch_5";
    fbus 2;
    from "pp_bus_2";
    tbus 5;
    to "pp_bus_5";
    r 0.05695 pu.Ohm;
    x 0.17388 pu.Ohm;
    b 0.0346 pu.S;
    rateA 9900 MVA;
    rateB 0 MVA;
    rateC 0 MVA;
    ratio 0 pu;
    angle 0 deg;
    status 1;
    angmin -360 deg;
    angmax 360 deg;
}
object pypower.branch
{
    name "pp_branch_6";
    fbus 3;
    from "pp_bus_3";
    tbus 4;
    to "pp_bus_4";
    r 0.06701 pu.Ohm;
    x 0.17103 pu.Ohm;
    b 0.0128 pu.S;
    rateA 9900 MVA;
    rateB 0 MVA;
    rateC 0 MVA;
    ratio 0 pu;
    angle 0 deg;
    status 1;
    angmin -360 deg;
    angmax 360 deg;
}
object pypower.branch
{
    name "pp_branch_7";
    fbus 4;
    from "pp_bus_4";
    tbus 5;
    to "pp_bus_5";
    r 0.01335 pu.Ohm;
    x 0.04211 pu.Ohm;
    b 0 pu.S;
    rateA 9900 MVA;
    rateB 0 MVA;
    rateC 0 MVA;
    ratio 0 pu;
    angle 0 deg;
    status 1;
    angmin -360 deg;
    angmax 360 deg;
}
object pypower.branch
{
    name "pp_branch_8";
    fbus 4;
    from "pp_bus_4";
    tbus 7;
    to "pp_bus_7";
    r 0 pu.Ohm;
    x 0.20912 pu.Ohm;
    b 0 pu.S;
    rateA 9900 MVA;
    rateB 0 MVA;
    rateC 0 MVA;
    ratio 0.978 pu;
    angle 0 deg;
    status 1;
    angmin -360 deg;
    angmax 360 deg;
}
object pypower.branch
{
    name "pp_branch_9";
    fbus 4;
    from "pp_bus_4";
    tbus 9;
    to "pp_bus_9";
    r 0 pu.Ohm;
    x 0.55618 pu.Ohm;
    b 0 pu.S;
    rateA 9900 MVA;
    rateB 0 MVA;
    rateC 0 MVA;
    ratio 0.969 pu;
    angle 0 deg;
    status 1;
    angmin -360 deg;
    angmax 360 deg;
}
object pypower.branch
{
    name "pp_branch_10";
    fbus 5;
    from "pp_bus_5";
    tbus 6;
    to "pp_bus_6";
    r 0 pu.Ohm;
    x 0.25202 pu.Ohm;
    b 0 pu.S;
    rateA 9900 MVA;
    rateB 0 MVA;
    rateC 0 MVA;
    ratio 0.932 pu;
    angle 0 deg;
    status 1;
    angmin -360 deg;
    angmax 360 deg;
}
object pypower.branch
{
    name "pp_branch_11";
    fbus 6;
    from "pp_bus_6";
    tbus 11;
    to "pp_bus_11";
    r 0.09498 pu.Ohm;
    x 0.1989 pu.Ohm;
    b 0 pu.S;
    rateA 9900 MVA;
    rateB 0 MVA;
    rateC 0 MVA;
    ratio 0 pu;
    angle 0 deg;
    status 1;
    angmin -360 deg;
    angmax 360 deg;
}
object pypower.branch
{
    name "pp_branch_12";
    fbus 6;
    from "pp_bus_6";
    tbus 12;
    to "pp_bus_12";
    r 0.12291 pu.Ohm;
    x 0.25581 pu.Ohm;
    b 0 pu.S;
    rateA 9900 MVA;
    rateB 0 MVA;
    rateC 0 MVA;
    ratio 0 pu;
    angle 0 deg;
    status 1;
    angmin -360 deg;
    angmax 360 deg;
}
object pypower.branch
{
    name "pp_branch_13";
    fbus 6;
    from "pp_bus_6";
    tbus 13;
    to "pp_bus_13";
    r 0.06615 pu.Ohm;
    x 0.13027 pu.Ohm;
    b 0 pu.S;
    rateA 9900 MVA;
    rateB 0 MVA;
    rateC 0 MVA;
    ratio 0 pu;
    angle 0 deg;
    status 1;
    angmin -360 deg;
    angmax 360 deg;
}
object pypower.branch
{
    name "pp_branch_14";
    fbus 7;
    from "pp_bus_7";
    tbus 8;
    to "pp_bus_8";
    r 0 pu.Ohm;
    x 0.17615 pu.Ohm;
    b 0 pu.S;
    rateA 9900 MVA;
    rateB 0 MVA;
    rateC 0 MVA;
    ratio 0 pu;
    angle 0 deg;
    status 1;
    angmin -360 deg;
    angmax 360 deg;
}
object pypower.branch
{
    name "pp_branch_15";
    fbus 7;
    from "pp_bus_7";
    tbus 9;
    to "pp_bus_9";
    r 0 pu.Ohm;
    x 0.11001 pu.Ohm;
    b 0 pu.S;
    rateA 9900 MVA;
    rateB 0 MVA;
    rateC 0 MVA;
    ratio 0 pu;
    angle 0 deg;
    status 1;
    angmin -360 deg;
    angmax 360 deg;
}
object pypower.branch
{
    name "pp_branch_16";
    fbus 9;
    from "pp_bus_9";
    tbus 10;
    to "pp_bus_10";
    r 0.03181 pu.Ohm;
    x 0.0845 pu.Ohm;
    b 0 pu.S;
    rateA 9900 MVA;
    rateB 0 MVA;
    rateC 0 MVA;
    ratio 0 pu;
    angle 0 deg;
    status 1;
    angmin -360 deg;
    angmax 360 deg;
}
object pypower.branch
{
    name "pp_branch_17";
    fbus 9;
    from "pp_bus_9";
    tbus 14;
    to "pp_bus_14";
    r 0.12711 pu.Ohm;
    x 0.27038 pu.Ohm;
    b 0 pu.S;
    rateA 9900 MVA;
    rateB 0 MVA;
    rateC 0 MVA;
    ratio 0 pu;
    angle 0 deg;
    status 1;
    angmin -360 deg;
    angmax 360 deg;
}
object pypower.branch
{
    name "pp_branch_18";
    fbus 10;
    from "pp_bus_10";
    tbus 11;
    to "pp_bus_11";
    r 0.08205 pu.Ohm;
    x 0.19207 pu.Ohm;
    b 0 pu.S;
    rateA 9900 MVA;
    rateB 0 MVA;
    rateC 0 MVA;
    ratio 0 pu;
    angle 0 deg;
    status 1;
    angmin -360 deg;
    angmax 360 deg;
}
object pypower.branch
{
    name "pp_branch_19";
    fbus 12;
    from "pp_bus_12";
    tbus 13;
    to "pp_bus_13";
    r 0.22092 pu.Ohm;
    x 0.19988 pu.Ohm;
    b 0 pu.S;
    rateA 9900 MVA;
    rateB 0 MVA;
    rateC 0 MVA;
    ratio 0 pu;
    angle 0 deg;
    status 1;
    angmin -360 deg;
    angmax 360 deg;
}
object pypower.branch
{
    name "pp_branch_20";
    fbus 13;
    from "pp_bus_13";
    tbus 14;
    to "pp_bus_14";
    r 0.17093 pu.Ohm;
    x 0.34802 pu.Ohm;
    b 0 pu.S;
    rateA 9900 MVA;
    rateB 0 MVA;
    rateC 0 MVA;
    ratio 0 pu;
    angle 0 deg;
    status 1;
    angmin -360 deg;
    angmax 360 deg;
}

//
// gencost
//
object pypower.gencost
{
    name pp_gencost_1;
    parent "pp_gen_1";
    model 2;
    startup 0.0;
    shutdown 0.0;
    costs "0.0430293,20.0,0.0";
}
object pypower.gencost
{
    name pp_gencost_2;
    parent "pp_gen_2";
    model 2;
    startup 0.0;
    shutdown 0.0;
    costs "0.25,20.0,0.0";
}
object pypower.gencost
{
    name pp_gencost_3;
    parent "pp_gen_3";
    model 2;
    startup 0.0;
    shutdown 0.0;
    costs "0.01,40.0,0.0";
}
object pypower.gencost
{
    name pp_gencost_4;
    parent "pp_gen_4";
    model 2;
    startup 0.0;
    shutdown 0.0;
    costs "0.01,40.0,0.0";
}
object pypower.gencost
{
    name pp_gencost_5;
    parent "pp_gen_5";
    model 2;
    startup 0.0;
    shutdown 0.0;
    costs "0.01,40.0,0.0";
}
